10/((p + 1)*(0.1*p + 1)*(0.01*p + 1))*(k3*p^2 + k2*p + k1)/p/(1 + 10/((p + 1)*(0.1*p + 1)*(0.01*p + 1))*(k3*p^2 + k2*p + k1)/p) collect, p → (10000.0*k3*p^2 + 10000.0*k2*p + 10000.0*k1)/(p^4 + 111.0*p^3 + (10000.0*k3 + 1110.0)*p^2 + (10000.0*k2 + 1000.0)*p + 10000.0*k1)
(p^4 + 111.0*p^3 + (10000.0*k3 + 1110.0)*p^2 + (10000.0*k2 + 1000.0)*p + 10000.0*k1)/1000.0 collect, p; substitute, p == a + w*1i → a + 10.0*k1 + (a + w*1i)^2*(10.0*k3 + 1.11) + 0.111*(a + w*1i)^3 + 0.001*(a + w*1i)^4 + 10.0*a*k2 + 10.0i*k2*w + 1.0i*w
A1(p) := 10
A2(p) := 10*p
A3(p) := 10*p^2
B(p) := p*(p + 1)*(0.01*p + 1)*(0.1*p + 1)
λ := [-3 + 3*1i; -3 - 3*1i]
Q11 := [A1(λ[0]); A1(λ[1])] → [10; 10]
Q12 := [A2(λ[0]), A3(λ[0]); A2(λ[1]), A2(λ[1])] → [-30 + 30i, -180i; -30 - 30i, -30 - 30i]
R1 := [-B(λ[0]); -B(λ[1])] → [-2.67 + 10.986i; -2.67 - 10.986i]
a + 10.0*k1 + (a + w*1i)^2*(10.0*k3 + 1.11) + 0.111*(a + w*1i)^3 + 0.001*(a + w*1i)^4 + 10.0*a*k2 + 10.0i*k2*w + 1.0i
Q21 := 10
Q22(w) := [A2(-10 - w + 1i*w), A3(-10 - w + 1i*w)] → [-100 + (-10 + 10i)*w, 10*(10 + w*(1 - 1i))^2]
R2(w) := -B(-10 - w + 1i*w) → -(0.9 - (0.01 - 0.01i)*w)*(2.52435489671e-29 - (0.1 - 0.1i)*w)*(9 + w*(1 - 1i))*(10 + w*(1 - 1i))
k1(w) := (R2(w) - Q22(w)*Q12^-1*R1)/(Q21 - Q22(w)*Q12^-1*Q11)
k1 := 8.2
Q12^-1*R1 - Q12^-1*Q11*k1 → [1.29953066667 - 0.835085333333i; 0.294736 - 0.392981333333i]
w := 0 .. 1000
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